folder simulations: version=37; creator=Apsim 7.10-r4221
  simulation Millet
    metfile met
      filename=D:\Mes Donnees\WD\Teaching\Analyse_reseau_Mil\data\weather\met_files\SAHEL_Senegal_Bambey_2021.met
    clock
      start_date = 01/01/2021
      end_date = 31/12/2021
    summaryfile
    area paddock
      PearlMillet
        PearlMilletConstants standard
          crop_type = PearlMillet
          default_crop_class = plant
          stage_names = sowing germination emergence end_of_juvenile floral_initiation flag_leaf flowering start_grain_fill end_grain_fill maturity harvest_ripe end_crop
          stage_code = 1   2   3    4      5     6     7    8    9    10   11   12
          pesw_germ = 0.0  # plant extractable soil water in seedling layer inadequate for germination (mm/mm)
          shoot_lag = 10.7  # time lag before linear coleoptile growth starts (deg days)
          shoot_rate = 1.17  # growing deg day increase with depth for coleoptile (deg day/mm depth)
          twilight = -2.2  # Twilight is defined as the interval between sunrise or sunset and the time when the true
          x_temp = 10 33 47  # cardinal temps.
          y_tt = 0  23  0  # diff
          x_temp_fm = 5.7 23.5
          y_tt_fm = 0   17.8
          leaf_no_at_emerg = 1  # (expanded) leaf number at emergence ()
          leaf_no_seed = 4.0  # number of leaf primordia present in seed
          leaf_no_min = 5.0  # minimum leaf number
          leaf_no_max = 40.0  # maximum leaf number
          leaf_init_rate = 27.9  # degree days to initiate each leaf primordium until floral init (deg day)
          leaf_app_rate1 = 38  # Growing deg day required to develop the most leaf ligules. (deg day).
          leaf_app_rate2 = 38  # Growing deg day required to develop last leaf ligules. (deg day).
          leaf_no_rate_change = 3.5  # Leaf no below flag above which leaf appearance rate changes from rate1 to rate2.
          leaf_app_rate = 35.3  # last leaf ligules. (deg day).
          rue = 1.86  # g bio/MJ Radn radiation use efficiency
          row_spacing_default = 750  # Default rowing spacing used to calculate k
          x_row_spacing = 0.20   0.75   1.50  # Row spacing
          y_extinct_coef = 0.79   0.61   0.37  # extinction coefficient for green leaf
          x_ave_temp = 8 20 35 50  # mean daily temperature
          y_stress_photo = 0  1  1  0  # multiplier on RUE
          dm_leaf_init = 0.005  # leaf weight at emergence (g/plant)
          dm_root_init = 0.0029  # root weight at emergence (g/plant)
          dm_stem_init = 0.0021  # stem weight at emergence (g/plant)
          stem_trans_frac = 0.15  # fraction of stem used in translocation to grain
          leaf_trans_frac = 0.15  # fraction of leaf used in translocation to grain
          retransRate = 0.15
          ratio_root_shoot = 0   0   1    1     0.33  0.33  0.087  0    0     0    0    0
          partition_rate_leaf = 0.0182  # coefficient of sigmoidal function between leaf partition fraction and internode no**2 (0-1)
          frac_stem2flower = 0.19  # fraction of dm allocated to stem that goes to developing head
          grn_water_cont = 0.155  # water content of grain g/g
          GrainTempWindow = -50 100
          GrainHiTemperature = 32 33 36 38
          GrainStressSeverity = 0 0.14 0.23 0.65
          leaf_no_correction = 1.45  # corrects for other growing leaves
          x_lai = 2  5
          y_lai_sla_max = 50000 25000  # maximum specific leaf area for delta LAI
          lai_sla_min = 8000  8000  # minimum specific leaf area for delta LAI
          sla_max = 65000
          sla_min = 8000  # minimum specific leaf area for new leaf area
          initial_tpla = 200.0  # initial total plant leaf area
          tiller_coef = 0.66  # exponent for determining leaf area on each additional tiller
          tpla_inflection_ratio = 0.608  # inflection coefficient of TPLA curve
          height_max = 3000.0  # maximum canopy height
          height_stem_slope = 300.0  # rate of height growth (mm/g/stem)
          root_depth_rate = 0 20.0  20.0  20.0 20.0  20.0   20.0   0      0       0    0    0  # mm/day.
          x_sw_ratio = 0   0.25  # water availability for effects on root depth growth
          y_sw_fac_root = 0   1  # stress factor for root depth growth, This may be probably the same for all crops
          initial_root_depth = 110  # initial depth of roots (mm)
          specific_root_length = 100000
          x_plant_rld = 0.0  0.1  # root branching
          y_rel_root_rate = 1.0  1.0
          transp_eff_cf = 0.009
          svp_fract = 0.75  # (0-1)
          x_sw_demand_ratio = 0.1 1.1  # water availability This is the original value
          y_swdef_leaf = 0   1  # stress indices
          x_sw_avail_ratio = 0 0.16 1.0  # water availability Needs to be severe to worry phenology
          y_swdef_pheno = 0 1.0 1.0  # stress indices
          no3_diffn_const = 2.0
          maxUptakeRate = 0.029
          initialRootNConc = 0.020
          targetRootNConc = 0.002
          initialLeafSLN = 1.5
          targetLeafSLN = 1.5
          newLeafSLN = 1.0
          leafDilnNSlope = 0.0043
          leafDilnNInt = -0.0017
          initialStemNConc = 0.01
          x_stem_n = 3         5       7         10
          targetStemNConc = 0.055   0.016   0.01      0.005
          structStemNConc = 0.012  0.012   0.005   0.0015
          stemDilnNSlope = 0.0062
          stemDilnNInt = -0.001
          initialRachisNConc = 0.000
          targetRachisNConc = 0.01
          structRachisNConc = 0.003
          rachisDilnNSlope = 0.0062
          rachisDilnNInt = -0.001
          grainFillRate = 0.001
          targetGrainNConc = 0.0175
          grainFillIntercept = 0.0000319
          grainFillSlope = 0.4026
          nUptakeCease = 570
          nSupplyFrac = 5
          dm_root_sen_frac = 0.002  # fraction of root dry matter senesced each day
          lai_sen_light = 4.0  # induced senescence occurs (m^2/m^2)
          sen_light_slope = 0.008  # sensitivity of leaf area senescence to shading
          x_temp_senescence = 0.0 6.0  # minimum temperature for frost senescence table (oC)
          y_senescence_fac = 1   0  # daily fraction of leaf area senesced due to frost (0-1)
          sen_rate_water = 0.05  # slope in linear eqn relating soil water stress during photosynthesis to leaf senesence rate
          dead_detach_frac = 0 0 0 0 0  # fraction detached from each part of a dead plant per day.
          dm_leaf_detach_frac = 0
          sen_light_time_const = 10.0  # delay factor for light senescence
          sen_radn_crit = 2  # radiation level for onset of light senescence
          frost_kill = 1.0  # temperature threshold for leaf death
          sen_water_time_const = 10.0  # delay factor for water senescence
          sen_threshold = 0.25  # supply:demand ratio for onset of water senescence
          spla_slope = 81.5  # regression slope for calculating inflection point for leaf senescence
          tt_emerg_limit = 150.0  # maximum degree days allowed for emergence to take place
          days_germ_limit = 40.0  # maximum days allowed after sowing for germination to take place (days)
          swdf_photo_limit = 99.0  # critical cumulative photosynthesis water stress, above which the crop partly fails (unitless)
          swdf_photo_rate = 0.01  # rate of plant reduction with photosynthesis water stress
          swdf_pheno_limit = 99.0  # critical cumulative phenology water stress, above which the crop fails (unitless)
          x_weighted_temp = 55.0  60.0
          y_plant_death = 0.0   1.0
          stress_determinants = leaf stem grain
          yield_parts = grain
          retrans_parts = leaf stem  flower
          pfact_photo_slope = 2.0
          pfact_expansion_slope = 2.0
          pfact_pheno_slope = 10
          pfact_grain_slope = 4
          p_uptake_factor = 1.5  # factor to calc total P uptake from demand for today's growth
          x_p_stage_code = 3       4      5      6      7      8      10
          y_p_conc_max_leaf = 0.005   0.004  0.003  0.0018 0.0015 0.0015 0.0020
          y_p_conc_min_leaf = 0.003   0.002  0.0015 0.0007 0.0007 0.0007 0.0007
          y_p_conc_sen_leaf = 0.0005  0.0005 0.0005 0.0005 0.0005 0.0005 0.0005
          y_p_conc_max_stem = 0.0057  0.0038 0.0037 0.0018 0.0016 0.0013 0.0013
          y_p_conc_min_stem = 0.003   0.003  0.002  0.0006 0.0006 0.0002 0.0002
          y_p_conc_sen_stem = 0.0002  0.0002 0.0002 0.0002 0.0002 0.0002 0.0002
          y_p_conc_max_root = 0.0010  0.0010 0.0010 0.0010 0.0010 0.0010 0.0010  # assume P conc in roots non-varying
          y_p_conc_min_root = 0.0010  0.0010 0.0010 0.0010 0.0010 0.0010 0.0010
          y_p_conc_sen_root = 0.0010  0.0010 0.0010 0.0010 0.0010 0.0010 0.0010
          y_p_conc_max_flower = 0.0057  0.0038 0.0037 0.0018 0.0016 0.0013 0.0013  # assumed same as stem
          y_p_conc_min_flower = 0.003   0.003  0.002  0.0006 0.0006 0.0002 0.0002
          y_p_conc_sen_flower = 0.0002  0.0002 0.0002 0.0002 0.0002 0.0002 0.0002
          y_p_conc_max_grain = 0.001   0.001  0.001  0.001  0.052  0.0044  0.0034
          y_p_conc_min_grain = 0.001   0.001  0.001  0.001  0.001  0.0015  0.0015  # based on Kenya maize data
          y_p_conc_sen_grain = 0.001   0.001  0.001  0.001  0.001  0.0015  0.0015
          y_p_conc_max_energy = 0.001   0.001  0.001  0.001  0.001  0.001  0.001
          y_p_conc_min_energy = 0.001   0.001  0.001  0.001  0.001  0.001  0.001
          y_p_conc_sen_energy = 0.001   0.001  0.001  0.001  0.001  0.001  0.001
          p_conc_init_leaf = 0.0059
          p_conc_init_stem = 0.0057
          p_conc_init_root = 0.010
          p_conc_init_flower = 0.0057
          p_conc_init_grain = 0.0052
          p_conc_init_energy = 0.0
          ll_ub = 1000.0  # upper limit of lower limit
          kl_ub = 1.0  # upper limit of water uptake factor
          minsw = 0.00001  # lowest acceptable value for ll
          latitude_ub = 90  # latitude upper limit
          latitude_lb = -90  # latitude lower limit
          maxt_ub = 58  # max. temperature upper limit
          maxt_lb = 0  # max. temperature lower limit
          mint_ub = 40  # min. temperature upper limit
          mint_lb = -10  # min. temperature lower limit
          radn_ub = 50  # radiation upper limit
          radn_lb = 1  # radiation lower limit
          dlayer_ub = 1000  # layer depth upper limit
          dlayer_lb = 0  # layer depth lower limit
          dul_dep_ub = 1000  # drained upper limit upper limit
          dul_dep_lb = 0  # drained upper limit lower limit
          sw_dep_ub = 1000  # soil water upper limit
          sw_dep_lb = 0  # soil water lower limit
          sw_ub = 1.0  # soil water upper limit
          sw_lb = 0.0  # soil water upper limit
          no3_ub = 10000  # soil nitrate upper limit
          no3_lb = 0  # soil nitrate lower limit
          no3_min_ub = 10000  # min. soil nitrate upper limit
          no3_min_lb = 0  # min. soil nitrate lower limit
          nh4_ub = 10000  # soil nitrate upper limit
          nh4_lb = 0  # soil nitrate lower limit
          nh4_min_ub = 10000  # min. soil nitrate upper limit
          nh4_min_lb = 0  # min. soil nitrate lower limit
          head_grain_no_max_ub = 10000.0  # upper limit !NOT USED
          grain_gth_rate_ub = 5.0  # upper limit !NOT USED
          tt_emerg_to_endjuv_ub = 500.0  # upper limit
          pp_endjuv_to_init_ub = 500.0  # upper limit oC h-1
          tt_flower_to_maturity_ub = 1000.0  # upper limit
          tt_maturity_to_ripe_ub = 1000.0  # upper limit
          tt_flower_to_start_grain_ub = 1000.0  # upper limit
          tt_flag_to_flower_ub = 1000.0  # upper limit
          senescedLeafSLN = 0.3
          x_co2_te_modifier = 350.0
          y_co2_te_modifier = 1.0
          leaf_area_calc_type = TPLA  # Canopy Calculation
          culmlog = leaves.log  # Log File
          tillerSlaBound = 30  # SLA Range (%)
        PearlMilletGenotype PM9444
          tt_emerg_to_endjuv = 100  # fixed for all genotypes
          photoperiod_crit1 = 11.5
          photoperiod_crit2 = 13.5
          photoperiod_slope = 11.5
          tt_endjuv_to_init = 265
          tt_flag_to_flower = 61
          tt_flower_to_start_grain = 80
          tt_maturity_to_ripe = 1
          tt_flower_to_maturity = 457  # using base temp of 5.7
          main_stem_coef = 2.79  # Power coeff for TPLAmax=TLN^coef
          tpla_prod_coef = 0.02  # curvature coefficient for leaf area
          tpla_inflection_ratio = 0.895  # inflection coefficient of TPLA curve
          dm_per_seed = 0.0006
          maxGFRate = 0.032
          x_stem_wt = 0    10  # look up table for canopy height
          y_height = 0  3000  # plant canopy height
          leaf_no_max = 26  # maximum leaf number
          aX0 = 0.743331  # Largest leaf multiplier
          aMaxS = 12.98  # Largest Leaf Area Factor
          aMaxI = -41.38  # Intercept for Largest leaf calculation
          aMaxVert = 0.05  # Vertical Offset for Largest Leaf Calc
          spla_prod_coef = 0.008
          spla_intercept = -170.924
          tilleringPropensity = 2.29  # Propensity to Tiller
          tillerSdSlope = 0.31  # Tiller Supply/demand slope
          aTillerVert = 0,05  # Additional Vertical Offset for each additional Tiller
        PearlMilletGenotype ICTP8203
          tt_emerg_to_endjuv = 100  # fixed for all genotypes
          photoperiod_crit1 = 11.5
          photoperiod_crit2 = 13.5
          photoperiod_slope = 11.5
          tt_endjuv_to_init = 165
          tt_flag_to_flower = 61
          tt_flower_to_start_grain = 80
          tt_maturity_to_ripe = 1
          tt_flower_to_maturity = 457  # using base temp of 5.7
          main_stem_coef = 2.79  # Power coeff for TPLAmax=TLN^coef
          tpla_prod_coef = 0.02  # curvature coefficient for leaf area
          tpla_inflection_ratio = 0.895  # inflection coefficient of TPLA curve
          dm_per_seed = 0.0008
          maxGFRate = 0.032
          x_stem_wt = 0    10  # look up table for canopy height
          y_height = 0  3000  # plant canopy height
          leaf_no_max = 26  # maximum leaf number
          aX0 = 0.845322  # Largest leaf multiplier
          aMaxS = 9.8861  # Largest Leaf Area Factor
          aMaxI = 30.439  # Intercept for Largest leaf calculation
          aMaxVert = 0.05  # Vertical Offset for Largest Leaf Calc
          spla_prod_coef = 0.008
          spla_intercept = -170.924
          tilleringPropensity = 2.29  # Propensity to Tiller
          tillerSdSlope = 0.31  # Tiller Supply/demand slope
          aTillerVert = 0,05  # Additional Vertical Offset for each additional Tiller
        PearlMilletGenotype rcbi911
          tt_emerg_to_endjuv = 239.4  # fixed for all genotypes
          photoperiod_crit1 = 11.5
          photoperiod_crit2 = 13.5
          photoperiod_slope = 11.5
          tt_endjuv_to_init = 112.4
          tt_flag_to_flower = 47.4
          tt_flower_to_start_grain = 80
          tt_maturity_to_ripe = 1
          tt_flower_to_maturity = 457  # using base temp of 5.7
          main_stem_coef = 2.8  # Power coeff for TPLAmax=TLN^coef
          tpla_prod_coef = 0.0149  # curvature coefficient for leaf area
          tpla_inflection_ratio = 0.69  # inflection coefficient of TPLA curve
          dm_per_seed = 0.0007
          maxGFRate = 0.032
          x_stem_wt = 0    10  # look up table for canopy height
          y_height = 0  3000  # plant canopy height
          leaf_no_max = 19  # maximum leaf number
          aX0 = 0.74478  # Largest leaf multiplier
          aMaxA = 500  # Largest Leaf Area Factor
          aMaxI = 58.2  # Intercept for Largest leaf calculation
          aMaxVert = 0.1  # Vertical Offset for Largest Leaf Calc
          spla_prod_coef = 0.008
          spla_intercept = -269.182
        PearlMilletGenotype bj104
          tt_emerg_to_endjuv = 239  # fixed for all genotypes
          photoperiod_crit1 = 11.5
          photoperiod_crit2 = 13.5
          photoperiod_slope = 11.5
          tt_endjuv_to_init = 112.4
          tt_flag_to_flower = 61
          tt_flower_to_start_grain = 80
          tt_maturity_to_ripe = 1
          tt_flower_to_maturity = 457  # using base temp of 5.7
          main_stem_coef = 2.888  # Power coeff for TPLAmax=TLN^coef
          tpla_prod_coef = 0.02  # curvature coefficient for leaf area
          tpla_inflection_ratio = 0.8055  # inflection coefficient of TPLA curve
          dm_per_seed = 0.00047
          maxGFRate = 0.032
          x_stem_wt = 0    10  # look up table for canopy height
          y_height = 0  3000  # plant canopy height
          leaf_no_max = 22  # maximum leaf number
          aX0 = 0.74  # Largest leaf multiplier
          aMaxA = 10  # Largest Leaf Area Factor
          aMaxI = 40  # Intercept for Largest leaf calculation
          aMaxVert = 0.1  # Vertical Offset for Largest Leaf Calc
          spla_prod_coef = 0.008
          spla_intercept = -200.519
          tilleringPropensity = 2.2953  # Propensity to Tiller
          tillerSdSlope = 0.3117  # Tiller Supply/demand slope
          aMaxS = 10  # Largest Leaf Area Factor
        PearlMilletGenotype wrajpop
          tt_emerg_to_endjuv = 239.4  # fixed for all genotypes
          photoperiod_crit1 = 11.5
          photoperiod_crit2 = 13.5
          photoperiod_slope = 11.5
          tt_endjuv_to_init = 180
          tt_flag_to_flower = 61
          tt_flower_to_start_grain = 80
          tt_maturity_to_ripe = 1
          tt_flower_to_maturity = 457  # using base temp of 5.7
          main_stem_coef = 2.79  # Power coeff for TPLAmax=TLN^coef
          tpla_prod_coef = 0.02  # curvature coefficient for leaf area
          tpla_inflection_ratio = 0.895  # inflection coefficient of TPLA curve
          dm_per_seed = 0.0007
          maxGFRate = 0.032
          x_stem_wt = 0    10  # look up table for canopy height
          y_height = 0  3000  # plant canopy height
          leaf_no_max = 20  # maximum leaf number
          aX0 = 0.7123  # Largest leaf multiplier
          aMaxS = 0  # Largest Leaf Area Factor
          aMaxI = 500  # Intercept for Largest leaf calculation
          aMaxVert = 0.1  # Vertical Offset for Largest Leaf Calc
          spla_prod_coef = 0.008
          spla_intercept = -170.924
          tilleringPropensity = 2.29  # Propensity to Tiller
          tillerSdSlope = 0.31  # Tiller Supply/demand slope
          aTillerVert = 0,05  # Additional Vertical Offset for each additional Tiller
        PearlMilletGenotype HHB67
          tt_emerg_to_endjuv = 100  # fixed for all genotypes
          photoperiod_crit1 = 11.5
          photoperiod_crit2 = 13.5
          photoperiod_slope = 11.5
          tt_endjuv_to_init = 175
          tt_flag_to_flower = 61
          tt_flower_to_start_grain = 80
          tt_maturity_to_ripe = 1
          tt_flower_to_maturity = 457  # using base temp of 5.7
          main_stem_coef = 2.79  # Power coeff for TPLAmax=TLN^coef
          tpla_prod_coef = 0.02  # curvature coefficient for leaf area
          tpla_inflection_ratio = 0.895  # inflection coefficient of TPLA curve
          dm_per_seed = 0.0007
          maxGFRate = 0.032
          x_stem_wt = 0    10  # look up table for canopy height
          y_height = 0  3000  # plant canopy height
          leaf_no_max = 26  # maximum leaf number
          aX0 = 0.8576  # Largest leaf multiplier
          aMaxS = 5.5053  # Largest Leaf Area Factor
          aMaxI = 33.312  # Intercept for Largest leaf calculation
          aMaxVert = 0.05  # Vertical Offset for Largest Leaf Calc
          spla_prod_coef = 0.008
          spla_intercept = -170.924
          tilleringPropensity = 2.29  # Propensity to Tiller
          tillerSdSlope = 0.31  # Tiller Supply/demand slope
          aTillerVert = 0,05  # Additional Vertical Offset for each additional Tiller
      Soil Loam_Medm_MF_125mm (No903-Generic): SoilType=Loam; Site=Generic; State=Generic; Country=Africa; ApsoilNumber=994-Generic; Latitude=-20.074444; Longitude=30.832778; YearOfSampling=0
        DataSource=Dr. John P Dimes, ICRISAT, Bulawayo, Zimbabwe J.Dimes@cgiar.org
        Comments:
          In the soil name : (HF is High Fertility, MF is Moderate Fertility, LF is Low Fertility) also PAWC in mm is included.

           Jawoo gave me this link:
          http://thedata.harvard.edu/dvn/dv/IFPRI/faces/study/StudyPage.xhtml?globalId=hdl:1902.1/20299

          And citation is:

          Koo, Jawoo; Dimes, John, 2010-07, "HC27 Generic Soil Profile Database", http://hdl.handle.net/1902.1/20299 International Food Policy Research Institute  [Distributor] V1 [Version]
        Water
          Thickness  BD   AirDry  LL15   DUL    SAT
          100        1.4  0.17    0.17   0.301  0.4
          200        1.4  0.18    0.18   0.31   0.41
          300        1.4  0.19    0.19   0.31   0.42
          300        1.4  0.215   0.215  0.315  0.43
          300        1.4  0.25    0.25   0.317  0.44
          SoilCrop maize: LL=[0.17, 0.18, 0.19, 0.215, 0.25]; KL=[0.08, 0.08, 0.08, 0.08, 0.06]; XF=[1, 1, 1, 1, 1]
          SoilCrop cowpea: LL=[0.17, 0.18, 0.19, 0.215, 0.25]; KL=[0.08, 0.08, 0.08, 0.08, 0.06]; XF=[1, 1, 1, 1, 1]
          SoilCrop peanut: LL=[0.17, 0.18, 0.19, 0.215, 0.25]; KL=[0.08, 0.08, 0.08, 0.08, 0.06]; XF=[1, 1, 1, 1, 1]
          SoilCrop soybean: LL=[0.17, 0.18, 0.19, 0.215, 0.25]; KL=[0.08, 0.08, 0.08, 0.08, 0.06]; XF=[1, 1, 1, 1, 1]
          SoilCrop weed: LL=[0.17, 0.18, 0.19, 0.215, 0.25]; KL=[0.08, 0.08, 0.08, 0.08, 0.06]; XF=[1, 1, 1, 1, 1]
          SoilCrop PearlMillet: LL=[0.17, 0.18, 0.19, 0.215, 0.25]; KL=[0.08, 0.08, 0.08, 0.08, 0.06]; XF=[1, 1, 1, 1, 1]
        SoilWater: SummerCona=3.5; SummerU=5; SummerDate=1-Nov; WinterCona=3.5; WinterU=5; WinterDate=1-Apr; DiffusConst=250; DiffusSlope=22; Salb=0.1; CN2Bare=85; CNRed=20; CNCov=0.8; Thickness=[100, 200, 300, 300, 300]; SWCON=[0.5, 0.5, 0.5, 0.5, 0.5]
        SoilOrganicMatter: RootCN=45; RootWt=100; SoilCN=12; EnrACoeff=7.4; EnrBCoeff=0.2; OCUnits=Total
          Thickness  OC    FBiom  FInert
          100        1     0.04   0.4
          200        0.62  0.03   0.45
          300        0.49  0.02   0.5
          300        0.45  0.015  0.75
          300        0.43  0.01   0.9
        Analysis: Thickness=[100, 200, 300, 300, 300]; PH=[6.5, 6.5, 6.5, 6.5, 6.5]; PHUnits=Water; BoronUnits=HotWater
        InitialWater: FractionFull=1; PercentMethod=FilledFromTop
        Sample InitialNitrogen: NO3Units=ppm; NH4Units=ppm; SWUnits=Volumetric; OCUnits=Total; PHUnits=Water
          Thickness  NO3    NH4
          100        6.503  0.599
          200        2.101  0.1
          300        2.101  0.1
          300        2.101  0.1
          300        2.101  0.1
      folder Manager folder
        manager Sow using a variable rule
          # Sowing criteria
          date1 = 15-jul  # Enter sowing window START date (dd-mmm)
          date2 = 15-jul  # Enter sowing window END date (dd-mmm)
          must_sow = yes  # Must sow?
          raincrit = 8.5  # Amount of rainfall
          rainnumdays = 5  # Number of days of rainfall
          esw_amount = 25  # Enter minimum allowable available soil water (mm)
          # Sowing parameters
          crop = PearlMillet  # Enter name of crop to sow
          density = 18  # Enter sowing density (plants/m2)
          depth = 30  # Enter sowing depth (mm)
          cultivar = wrajpop  # Enter cultivar
          row_spacing = 450  # Enter row spacing (mm)
          skiprow = solid
          ftn = 3  # Enter Fertile Tiller Number
          on start_of_day:
```
if (paddock_is_fallow() = 1)) then
   if (date_within('[date1], [date2]') = 1) then
      if (rain[[rainnumdays]] >= [raincrit] AND esw >= [esw_amount]) OR
          ('[must_sow]' = 'yes' AND today = date('[date2]'))) THEN
         season = current_season
         SowDay = day
         SowYear = year
         TT = DeltaTT
         InCropRain = rain
         [crop] sow plants =[density], sowing_depth = [depth], cultivar = [cultivar], row_spacing = [row_spacing], skip = [skiprow], tiller_no_fertile = [ftn]
      endif
   endif
 endif
```
          on init:
```
crop_in = 0
```
          on end_of_day:
```
  ! daily output
                    if ( paddock_is_fallow() = 0) then
                        Outputfile do_output
                    endif
```
        manager Harvesting rule
          # Harvesting criteria
          crop = PearlMillet  # Enter name of crop to harvest when ripe
          on end_of_day:
```
           if ('[crop]' = 'cotton') then
              if ([crop].ozcot_status > 0) then
                  [crop] harvest
              endif
           elseif ([crop].StageName = 'harvest_ripe' or [crop].plant_status = 'dead') then
              [crop]  harvest
              [crop]  end_crop
           endif
```
        folder fertilisation
          manager Fertilise at sowing
            # When should fertiliser be applied
            modulename = PearlMillet  # On which module should the event come from
            eventname = sowing  # On which event should fertiliser be applied
            # Fertiliser application details
            fertmodule = fertiliser  # Module used to apply the fertiliser
            fert_amount_sow = 0  # Amount of starter fertiliser at sowing (kg/ha)
            fert_type_sow = urea  # Sowing fertiliser type
            on [modulename].[eventname]:
```
        [fertmodule] apply amount = [fert_amount_sow] (kg/ha), depth = 50 (mm), type = [fert_type_sow]
```
          manager Fertilise on days after sowing - top up
            # When should fertiliser be applied
            modulename = PearlMillet  # On which crop is fertiliser being applied
            fert_das = 20  # Enter fertiliser days after sowing
            fert_criteria = 40  # Amount of N required in top 3 layers (kg/ha)
            # Fertiliser application details
            fertmodule = fertiliser  # Module used to apply the fertiliser
            fert_type = urea  # Fertiliser type
            on start_of_day:
```
         if ([modulename].DaysAfterSowing = [fert_das]) then
            N_deficit = [fert_criteria] - (no3(1) + nh4(1) + no3(2) + nh4(2) + no3(3) + nh4(3))
            '[fertmodule]' apply amount = N_deficit (kg/ha), depth = 50 (mm), type = [fert_type] ()
         endif
```
      fertiliser
      irrigation
        automatic_irrigation = off
        asw_depth = 600  # Depth to which ASW is calculated. (mm)
        crit_fr_asw = 0.5  # Fraction of ASW below which irrigation is applied (0-1.0)
        irrigation_efficiency = 1  # Efficiency of the irrigation. (0-1.0)
        irrigation_allocation = off  # Allocation limits
        allocation = 0  # Allocation in mm
        default_no3_conc = 0.0  # Nitrate concentration (ppm N)
        default_nh4_conc = 0.0  # Ammonium concentration (ppm N)
        default_cl_conc = 0.0  # Chloride concentration (ppm Cl)
      surfaceom
        PoolName = millet  # Organic Matter pool name
        type = millet  # Organic Matter type
        mass = 0.0  # Initial surface residue (kg/ha)
        cnr = 33.0  # C:N ratio of initial residue
        standing_fraction = 0.0  # Fraction of residue standing
      outputfile: filename=Millet.out; title=Millet
        variables
          variables: MinT, MaxT, Rain, Stage, biomass, Yield, Lai, tillers, irrig_tot, title, dd/mm/yyyy
  factorial Factorials: active=0
    settings
