folder simulations: version=37; creator=Apsim 7.10-r4221
  simulation Millet
    metfile met
      filename=D:\Mes Donnees\WD\Teaching\Analyse_reseau_Mil\data\weather\met_files\SAHEL_Senegal_Bambey_2021.met
    clock
      start_date = 01/01/2021  # Enter the start date of the simulation
      end_date = 31/12/2021  # Enter the end date of the simulation
    summaryfile
    area paddock
      Soil Loam_Medm_MF_125mm (No903-Generic): SoilType=Loam; Site=Generic; State=Generic; Country=Africa; ApsoilNumber=994-Generic; Latitude=-20.074444; Longitude=30.832778; YearOfSampling=0
        DataSource=Dr. John P Dimes, ICRISAT, Bulawayo, Zimbabwe J.Dimes@cgiar.org
        Comments:
          In the soil name : (HF is High Fertility, MF is Moderate Fertility, LF is Low Fertility) also PAWC in mm is included.

           Jawoo gave me this link:
          http://thedata.harvard.edu/dvn/dv/IFPRI/faces/study/StudyPage.xhtml?globalId=hdl:1902.1/20299

          And citation is:

          Koo, Jawoo; Dimes, John, 2010-07, "HC27 Generic Soil Profile Database", http://hdl.handle.net/1902.1/20299 International Food Policy Research Institute  [Distributor] V1 [Version]
        Water
          Thickness  BD   AirDry  LL15   DUL    SAT
          100        1.4  0.17    0.17   0.301  0.4
          200        1.4  0.18    0.18   0.31   0.41
          300        1.4  0.19    0.19   0.31   0.42
          300        1.4  0.215   0.215  0.315  0.43
          300        1.4  0.25    0.25   0.317  0.44
          SoilCrop maize: LL=[0.17, 0.18, 0.19, 0.215, 0.25]; KL=[0.08, 0.08, 0.08, 0.08, 0.06]; XF=[1, 1, 1, 1, 1]
          SoilCrop cowpea: LL=[0.17, 0.18, 0.19, 0.215, 0.25]; KL=[0.08, 0.08, 0.08, 0.08, 0.06]; XF=[1, 1, 1, 1, 1]
          SoilCrop peanut: LL=[0.17, 0.18, 0.19, 0.215, 0.25]; KL=[0.08, 0.08, 0.08, 0.08, 0.06]; XF=[1, 1, 1, 1, 1]
          SoilCrop soybean: LL=[0.17, 0.18, 0.19, 0.215, 0.25]; KL=[0.08, 0.08, 0.08, 0.08, 0.06]; XF=[1, 1, 1, 1, 1]
          SoilCrop weed: LL=[0.17, 0.18, 0.19, 0.215, 0.25]; KL=[0.08, 0.08, 0.08, 0.08, 0.06]; XF=[1, 1, 1, 1, 1]
          SoilCrop millet: LL=[0.17, 0.18, 0.19, 0.215, 0.25]; KL=[0.08, 0.08, 0.08, 0.08, 0.06]; XF=[1, 1, 1, 1, 1]
        SoilWater: SummerCona=3.5; SummerU=5; SummerDate=1-Nov; WinterCona=3.5; WinterU=5; WinterDate=1-Apr; DiffusConst=250; DiffusSlope=22; Salb=0.1; CN2Bare=85; CNRed=20; CNCov=0.8; Thickness=[100, 200, 300, 300, 300]; SWCON=[0.5, 0.5, 0.5, 0.5, 0.5]
        SoilOrganicMatter: RootCN=45; RootWt=100; SoilCN=12; EnrACoeff=7.4; EnrBCoeff=0.2; OCUnits=Total
          Thickness  OC    FBiom  FInert
          100        1     0.04   0.4
          200        0.62  0.03   0.45
          300        0.49  0.02   0.5
          300        0.45  0.015  0.75
          300        0.43  0.01   0.9
        Analysis: Thickness=[100, 200, 300, 300, 300]; PH=[6.5, 6.5, 6.5, 6.5, 6.5]; PHUnits=Water; BoronUnits=HotWater
        InitialWater: FractionFull=1; PercentMethod=FilledFromTop
        Sample InitialNitrogen: NO3Units=ppm; NH4Units=ppm; SWUnits=Volumetric; OCUnits=Total; PHUnits=Water
          Thickness  NO3    NH4
          100        6.503  0.599
          200        2.101  0.1
          300        2.101  0.1
          300        2.101  0.1
          300        2.101  0.1
      surfaceom SurfaceOrganicMatter
        PoolName = wheat  # Organic Matter pool name
        type = wheat  # Organic Matter type
        mass = 1000  # Initial surface residue (kg/ha)
        cnr = 80  # C:N ratio of initial residue
        standing_fraction = 0  # Fraction of residue standing
      fertiliser
      canopy
        intercrop = millet millet1 millet2 millet3 millet4 millet5  # Enter crop names to intercrop
      millet
      folder Manager folder
        manager Sow on a fixed date
          # Sowing criteria
          date = 15-jul  # Enter sowing date (dd-mmm)
          # Sowing parameters
          crop = millet  # Enter name of crop to sow
          density = 7.5  # Enter sowing density (plants/m2)
          depth = 30  # Enter sowing depth (mm)
          cultivar = wrajpop  # Enter cultivar
          on start_of_day:
```
        if (today = date('[date]') then
            [crop] sow plants =[density], sowing_depth = [depth], cultivar = [cultivar]
         endif
```
        manager Harvesting rule
          # Harvesting criteria
          crop = millet  # Enter name of crop to harvest when ripe
          on end_of_day:
```
if [crop].StageName = 'harvest_ripe' or [crop].plant_status = 'dead' then
   [crop] harvest
   [crop]1 harvest
   [crop]2 harvest
   [crop]3 harvest
   [crop]4 harvest
   [crop]5 harvest
   [crop] end_crop
   [crop]1 end_crop
   [crop]2 end_crop
   [crop]3 end_crop
   [crop]4 end_crop
   [crop]5 end_crop
   
endif
```
        manager Tiller Aggregation
          on init:
```
millet_yield = 0.0
millet_lai = 0.0
millet_biomass = 0.0
```
          on end_of_day:
```
millet_yield = millet.yield + millet1.yield + millet2.yield + millet3.yield + millet4.yield + millet5.yield
millet_lai = millet.lai + millet1.lai + millet2.lai + millet3.lai + millet4.lai + millet5.lai
millet_biomass = millet.biomass + millet1.biomass + millet2.biomass + millet3.biomass + millet4.biomass + millet5.biomass
```
      outputfile: filename=Millet.out; title=Millet
        variables
          variables: dd/mm/yyyy as Date, stage, plant_status, millet_biomass, millet_yield, millet_lai, biomass, yield, lai
        events Reporting Frequency: event=daily
